# OpenSim document version 30000
Model:
  length_units: meters
  force_units: N
  gravity: 0 -9.80665 0
  credits:
    Frank Anderson, Peter Loan, Ayman Habib, Ajay Seth, Michael Sherman
  BodySet:
    Body ground: mass=0 mass_center=(0 0 0) inertia_xx=1 inertia_yy=1 inertia_zz=1
    Body humerus: mass=1 mass_center=(0 0 0) inertia_xx=0 inertia_yy=0 inertia_zz=0
      PinJoint shoulder: parent_body=ground location_in_parent=(0 0 0) location=(-1 0 0)
        Coordinate shoulder_coord_0: motion_type=rotational
    Body radius: mass=1 mass_center=(0 0 0) inertia_xx=0 inertia_yy=0 inertia_zz=0
      PinJoint elbow: parent_body=humerus location_in_parent=(0 0 0) location=(-1 0 0)
        Coordinate elbow_coord_0: motion_type=rotational
  ForceSet:
    CoordinateActuator: coordinate=shoulder_coord_0
    CoordinateActuator: coordinate=elbow_coord_0
